*Heading
** Job name: Job-SEMP-3c-DYN_acc1-1 Model name: Model-SEMP-3-c-DYN
** Generated by: Abaqus/CAE 6.12-1
*Preprint, echo=NO, model=NO, history=NO, contact=NO
**
** PARTS
**
*Part, name=BASE
*End Part
**
*Part, name=brack-1
*End Part
**
*Part, name=brack-2
*End Part
**
*Part, name=film
*End Part
**
*Part, name=foro-gomma
*End Part
**
*Part, name=foro-gomma-BUL
*End Part
**
*Part, name=foro-gomma-ST
*End Part
**
*Part, name=glass-s1
*End Part
**
*Part, name=glass-shell
*End Part
**
**
** ASSEMBLY
**
*Assembly, name=Assembly
**
*Instance, name=foro-gomma-1, part=foro-gomma
0.295000005364418,       -0.334,       -0.033
*Node
      1,           0., 0.0120000001, 0.0329999998
      2,           0., 0.0120000001,           0.
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*Element, type=C3D8R
  1,  68, 259, 585, 239,   1,  17, 169,  40
  2, 259, 260, 586, 585,  17,  18, 170, 169
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*Nset, nset=Set-1, generate
   1,  864,    1
*Elset, elset=Set-1, generate
   1,  576,    1
** Section: RUBBER
*Solid Section, elset=Set-1, material=rubber
1.,
*End Instance
**
*Instance, name=foro-gomma-2, part=foro-gomma
0.695000005364418,       -0.334,       -0.033
*Node
      1,           0., 0.0120000001, 0.0329999998
      2,           0., 0.0120000001,           0.
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*Element, type=C3D8R
  1,  68, 259, 585, 239,   1,  17, 169,  40
  2, 259, 260, 586, 585,  17,  18, 170, 169
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*Nset, nset=Set-1, generate
   1,  864,    1
*Elset, elset=Set-1, generate
   1,  576,    1
** Section: RUBBER
*Solid Section, elset=Set-1, material=rubber
1.,
*End Instance
**
*Instance, name=foro-gomma-BUL-1, part=foro-gomma-BUL
0.295000016689301,       -0.334,       -0.033
*Node
      1, -0.0120000001,           0., 0.0329999998
      2,           0., -0.0120000001, 0.0329999998
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*Element, type=C3D8R
 1,  69,  70, 118, 117,  17,  18,  66,  65
 2,  70,  20,  68, 118,  18,   1,  19,  66
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*Nset, nset=Set-1, generate
   1,  136,    1
*Elset, elset=Set-1, generate
  1,  84,   1
** Section: bulloni
*Solid Section, elset=Set-1, material=bulloni
1.,
*End Instance
**
*Instance, name=foro-gomma-BUL-2, part=foro-gomma-BUL
0.695000016689301,       -0.334,       -0.033
*Node
      1, -0.0120000001,           0., 0.0329999998
      2,           0., -0.0120000001, 0.0329999998
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*Element, type=C3D8R
 1,  69,  70, 118, 117,  17,  18,  66,  65
 2,  70,  20,  68, 118,  18,   1,  19,  66
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*Nset, nset=Set-1, generate
   1,  136,    1
*Elset, elset=Set-1, generate
  1,  84,   1
** Section: bulloni
*Solid Section, elset=Set-1, material=bulloni
1.,
*End Instance
**
*Instance, name=foro-gomma-ST-1, part=foro-gomma-ST
0.295000016689301,       -0.334,        0.003
*Node
      1, -0.0199999996,           0., 0.0149999997
      2,           0., -0.0199999996, 0.0149999997
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*Element, type=C3D8R
 1,  50, 185, 357, 181,   1,  25, 165,  36
 2, 185, 186, 358, 357,  25,  26, 166, 165
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*Nset, nset=Set-1, generate
   1,  420,    1
*Elset, elset=Set-1, generate
   1,  240,    1
** Section: bulloni
*Solid Section, elset=Set-1, material=bulloni
1.,
*End Instance
**
*Instance, name=foro-gomma-ST-2, part=foro-gomma-ST
0.695000016689301,       -0.334,        0.003
*Node
      1, -0.0199999996,           0., 0.0149999997
      2,           0., -0.0199999996, 0.0149999997
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*Element, type=C3D8R
 1,  46, 159, 269, 157,   1,  25, 149,  34
 2, 159, 160, 270, 269,  25,  26, 150, 149
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*Nset, nset=Set-1, generate
   1,  300,    1
*Elset, elset=Set-1, generate
   1,  160,    1
** Section: bulloni
*Solid Section, elset=Set-1, material=bulloni
1.,
*End Instance
**
*Instance, name=BASE-1, part=BASE
0.195000016689301,       -0.534,       -0.283
0.195000016689301,       -0.534,       -0.283, 1.1950000166893,       -0.534,       -0.283,          90.
*Node
      1,  0.600000024,          0.5, 0.0399999991
      2,  0.600000024,  0.449999988, 0.0399999991
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*Element, type=C3D8R
  1,  23,  24,  35,  34,   1,   2,  13,  12
  2,  24,  25,  36,  35,   2,   3,  14,  13
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*Nset, nset=Set-1, generate
   1,  286,    1
*Elset, elset=Set-1, generate
   1,  120,    1
** Section: Section-2
*Solid Section, elset=Set-1, material=Material-2
1.,
*End Instance
**
*Instance, name=film-1, part=film
       0.195,       -0.534,           0.
*Node
      1,  0.200000003,  0.200000003,           0.
      2,  0.200000003,  0.200000003, 0.00300000003
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*Element, type=C3D8R
 1, 145,  32, 143, 288,  30,   1,  31, 137
 2, 146,  33, 144, 287, 145,  32, 143, 288
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*Nset, nset=Set-1, generate
   1,  336,    1
*Elset, elset=Set-1, generate
   1,  174,    1
** Section: RUBBER
*Solid Section, elset=Set-1, material=rubber
1.,
*End Instance
**
*Instance, name=film-2, part=film
0.595000040531159,       -0.534,           0.
*Node
      1,  0.200000003,  0.200000003,           0.
      2,  0.200000003,  0.200000003, 0.00300000003
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*Element, type=C3D8R
 1, 145,  32, 143, 288,  30,   1,  31, 137
 2, 146,  33, 144, 287, 145,  32, 143, 288
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*Nset, nset=Set-1, generate
   1,  336,    1
*Elset, elset=Set-1, generate
   1,  174,    1
** Section: RUBBER
*Solid Section, elset=Set-1, material=rubber
1.,
*End Instance
**
*Instance, name=glass-s1-1, part=glass-s1
0.295000043511391,       -0.334,       -0.033
*Node
      1,  0.100000001,  0.100000001, 0.0164999999
      2,  0.100000001,           0., 0.0164999999
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*Element, type=C3D8R
  1,  381,  382, 1100, 1072,   37,   38,  338,  337
  2,  382,   50,  349, 1100,   38,    1,   39,  338
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*Nset, nset=Set-1, generate
    1,  1568,     1
*Elset, elset=Set-1, generate
    1,  1104,     1
** Section: GLASS
*Solid Section, elset=Set-1, material=glass
1.,
*End Instance
**
*Instance, name=glass-s1-2, part=glass-s1
0.69500004351139,       -0.334,       -0.033
*Node
      1,  0.100000001,  0.100000001, 0.0164999999
      2,  0.100000001,           0., 0.0164999999
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*Element, type=C3D8R
  1,  381,  382, 1100, 1072,   37,   38,  338,  337
  2,  382,   50,  349, 1100,   38,    1,   39,  338
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*Nset, nset=Set-1, generate
    1,  1568,     1
*Elset, elset=Set-1, generate
    1,  1104,     1
** Section: GLASS
*Solid Section, elset=Set-1, material=glass
1.,
*End Instance
**
*Instance, name=glass-shell-1, part=glass-shell
0.19500004351139,       -0.434,      -0.0165
*Node
      1,  0.400000006,  0.100000001,           0.
      2,  0.300000012,  0.100000001,           0.
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*Element, type=S4R
1,   1,  22, 110,  27
2,  22,  23, 111, 110
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*Nset, nset=Set-1, generate
   1,  206,    1
*Elset, elset=Set-1, generate
   1,  175,    1
** Section: glass-shell
*Shell Section, elset=Set-1, material=glass
0.033, 9
*End Instance
**
*Instance, name=brack-1-1, part=brack-1
0.195000067353248,       -0.534,        0.003
*Node
      1,  0.200000003,  0.100000001, 0.00749999983
      2,  0.200000003,  0.100000001, 0.0149999997
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*Element, type=C3D8R
 1,  67, 259, 473, 241,   1,  46, 235,  53
 2, 259,  71, 250, 473,  46,   2,  47, 235
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*Nset, nset=Set-1, generate
   1,  560,    1
*Elset, elset=Set-1, generate
   1,  348,    1
** Section: Section-1
*Solid Section, elset=Set-1, material=steel
1.,
*End Instance
**
*Instance, name=brack-2-1, part=brack-2
0.19500006735325,       -0.519,        0.018
0.19500006735325,       -0.519,        0.018, 1.19500006735325,       -0.519,        0.018,          90.
*Node
      1,  0.200000003,  0.100000001, 0.0149999997
      2,  0.200000003,  0.100000001, 0.00749999983
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*Element, type=C3D8R
 1,  45,  49, 145, 136,   1,   2,  28,  33
 2, 136, 145, 146, 137,  33,  28,  29,  32
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*Nset, nset=Set-1, generate
   1,  243,    1
*Elset, elset=Set-1, generate
   1,  128,    1
** Section: Section-1
*Solid Section, elset=Set-1, material=steel
1.,
*End Instance
**
*Instance, name=brack-1-2, part=brack-1
0.595000067353248,       -0.534,        0.003
*Node
      1,  0.200000003,  0.100000001, 0.00749999983
      2,  0.200000003,  0.100000001, 0.0149999997
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*Element, type=C3D8R
 1,  67, 259, 473, 241,   1,  46, 235,  53
 2, 259,  71, 250, 473,  46,   2,  47, 235
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*Nset, nset=Set-1, generate
   1,  560,    1
*Elset, elset=Set-1, generate
   1,  348,    1
** Section: Section-1
*Solid Section, elset=Set-1, material=steel
1.,
*End Instance
**
*Instance, name=brack-2-2, part=brack-2
0.59500006735325,       -0.519,        0.018
0.59500006735325,       -0.519,        0.018, 1.59500006735325,       -0.519,        0.018,          90.
*Node
      1,  0.200000003,  0.100000001, 0.0149999997
      2,  0.200000003,  0.100000001, 0.00749999983
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*Element, type=C3D8R
 1,  45,  49, 145, 136,   1,   2,  28,  33
 2, 136, 145, 146, 137,  33,  28,  29,  32
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*Nset, nset=Set-1, generate
   1,  243,    1
*Elset, elset=Set-1, generate
   1,  128,    1
** Section: Section-1
*Solid Section, elset=Set-1, material=steel
1.,
*End Instance
**
*Node
      1,  0.495000005, -0.574000001, -0.0329999998
*Node
      2,  0.495000035,  0.266000003, -0.0164999999
*Node
      3,  0.495000035,   6.26599979, -0.0164999999
*Element, type=CONN3D2
2, 2, 3
*Connector Section, elset=Wire-1-Set-1
Beam,
*Nset, nset=Wire-1-Set-1
 2, 3
*Elset, elset=Wire-1-Set-1
 2,
*Nset, nset=s_Set-41, instance=glass-shell-1
  15,  16,  17,  18,  21,  71,  72,  73,  74,  83,  84,  99, 104, 105, 106, 107
*Elset, elset=s_Set-41, instance=glass-shell-1
  83,  84,  85,  86,  87, 100, 101, 102, 140, 141, 162, 163, 164, 165, 166
*Nset, nset=m_Set-41
 2,
*Nset, nset=m_Set-30
 1,
*Nset, nset=Set-3, instance=foro-gomma-BUL-1
   3,   4,   6,   8,  10,  11
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*Nset, nset=Set-3, instance=foro-gomma-BUL-2
   3,   4,   6,   8,  10,  11
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*Elset, elset=Set-3, instance=foro-gomma-BUL-1
  6,  7, 12, 17, 20, 23
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*Elset, elset=Set-3, instance=foro-gomma-BUL-2
  6,  7, 12, 17, 20, 23
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*Nset, nset=Set-29
 1,
*Nset, nset=Set-42
 3,
*Nset, nset=Set-43
 2,
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*Elset, elset=Set-1, instance=brack-2-1
   4,   8,  12,  16,  45,  46,  47,  48,  65,  66,  67,  68, 100, 104, 108, 112
*Elset, elset=Set-1, instance=brack-2-2
   4,   8,  12,  16,  45,  46,  47,  48,  65,  66,  67,  68, 100, 104, 108, 112
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*Elset, elset=Set-TOT, instance=foro-gomma-1, generate
   1,  576,    1
*Elset, elset=Set-TOT, instance=foro-gomma-BUL-1, generate
  1,  84,   1
*Elset, elset=Set-TOT, instance=foro-gomma-BUL-2, generate
  1,  84,   1
*Elset, elset=Set-TOT, instance=BASE-1, generate
   1,  120,    1
*Elset, elset=Set-TOT, instance=brack-2-2, generate
   1,  128,    1
*Elset, elset=Set-TOT, instance=brack-1-2, generate
   1,  348,    1
*Elset, elset=Set-TOT, instance=foro-gomma-2, generate
   1,  576,    1
*Elset, elset=Set-TOT, instance=foro-gomma-ST-2, generate
   1,  160,    1
*Elset, elset=Set-TOT, instance=film-2, generate
   1,  174,    1
*Elset, elset=Set-TOT, instance=glass-shell-1, generate
   1,  175,    1
*Elset, elset=Set-TOT, instance=brack-1-1, generate
   1,  348,    1
*Elset, elset=Set-TOT, instance=glass-s1-1, generate
    1,  1104,     1
*Elset, elset=Set-TOT, instance=foro-gomma-ST-1, generate
   1,  240,    1
*Elset, elset=Set-TOT, instance=brack-2-1, generate
   1,  128,    1
*Elset, elset=Set-TOT, instance=film-1, generate
   1,  174,    1
*Elset, elset=Set-TOT, instance=glass-s1-2, generate
    1,  1104,     1
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*Nset, nset=Set-MID, instance=glass-s1-2
   3,   4,   8,   9,  10,  19
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*Nset, nset=Set-MID, instance=glass-shell-1, generate
   1,  206,    1
*Nset, nset=Set-MID, instance=glass-s1-1
   3,   4,   8,   9,  10,  19
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*Nset, nset=Set-13, instance=BASE-1
 188, 189, 210, 211, 232, 233, 254, 255, 276, 277
*Nset, nset=Set-13dx, instance=BASE-1
  12,  13,  34,  35,  56,  57,  78,  79, 100, 101
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*Elset, elset=_BASE-1-BASE-1_S5, internal, instance=BASE-1, generate
   1,  120,    1
*Surface, type=ELEMENT, name=BASE-1-BASE-1
_BASE-1-BASE-1_S5, S5
*Elset, elset=_BASE-2-BASE-1_S5, internal, instance=BASE-1, generate
   1,  120,    1
*Surface, type=ELEMENT, name=BASE-2-BASE-1
_BASE-2-BASE-1_S5, S5
*Elset, elset=_GOMMA-1-foro-gomma-1_S1, internal, instance=foro-gomma-1
  97,  98,  99, 100, 101, 102
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*Surface, type=ELEMENT, name=GOMMA-1-foro-gomma-1
_GOMMA-1-foro-gomma-1_S1, S1
*Elset, elset=_GOMMA-2-foro-gomma-2_S1, internal, instance=foro-gomma-2
  97,  98,  99, 100, 101, 102
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*Surface, type=ELEMENT, name=GOMMA-2-foro-gomma-2
_GOMMA-2-foro-gomma-2_S1, S1
*Elset, elset=_film-1_S4, internal, instance=film-1
   3,   4,  30,  59,  60,  61,  62, 131, 132, 133, 134, 157, 158, 159, 160
*Elset, elset=_film-1_S3, internal, instance=film-1
   5,   6,   7,   8,   9,  10
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*Elset, elset=_film-1_S2, internal, instance=film-1
  71,  72,  73,  74,  75,  76
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*Surface, type=ELEMENT, name=film-1
_film-1_S4, S4
_film-1_S3, S3
_film-1_S2, S2
*Elset, elset=_film-2_S4, internal, instance=film-2
   3,   4,  30,  59,  60,  61,  62, 131, 132, 133, 134, 157, 158, 159, 160
*Elset, elset=_film-2_S3, internal, instance=film-2
   5,   6,   7,   8,   9,  10
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*Elset, elset=_film-2_S2, internal, instance=film-2
  71,  72,  73,  74,  75,  76
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*Surface, type=ELEMENT, name=film-2
_film-2_S4, S4
_film-2_S3, S3
_film-2_S2, S2
*Elset, elset=_film-1b_S4, internal, instance=film-1
  17,  18,  19,  20,  21,  22
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*Elset, elset=_film-1b_S3, internal, instance=film-1
   1,   2,  29,  67,  68,  69
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*Elset, elset=_film-1b_S2, internal, instance=film-1
  31,  32,  33,  34,  35,  36
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*Surface, type=ELEMENT, name=film-1b
_film-1b_S4, S4
_film-1b_S3, S3
_film-1b_S2, S2
*Elset, elset=_film-2b_S4, internal, instance=film-2
  17,  18,  19,  20,  21,  22
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*Elset, elset=_film-2b_S3, internal, instance=film-2
   1,   2,  29,  67,  68,  69
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*Elset, elset=_film-2b_S2, internal, instance=film-2
  31,  32,  33,  34,  35,  36
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*Surface, type=ELEMENT, name=film-2b
_film-2b_S4, S4
_film-2b_S3, S3
_film-2b_S2, S2
*Elset, elset=_PIN-1-foro-gomma-BUL-1_S4, internal, instance=foro-gomma-BUL-1
 51, 60, 68, 70, 71, 74, 75, 77, 81, 82, 83, 84
*Elset, elset=_PIN-1-foro-gomma-BUL-1_S3, internal, instance=foro-gomma-BUL-1
 49, 54, 55, 56, 57, 58, 61, 62, 65, 66, 69, 78
*Surface, type=ELEMENT, name=PIN-1-foro-gomma-BUL-1
_PIN-1-foro-gomma-BUL-1_S4, S4
_PIN-1-foro-gomma-BUL-1_S3, S3
*Elset, elset=_PIN-1-foro-gomma-1_S2, internal, instance=foro-gomma-1
   1,   2,   3,   4,   5,   6
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*Surface, type=ELEMENT, name=PIN-1-foro-gomma-1
_PIN-1-foro-gomma-1_S2, S2
*Elset, elset=_PIN-2-foro-gomma-BUL-2_S4, internal, instance=foro-gomma-BUL-2
 51, 60, 68, 70, 71, 74, 75, 77, 81, 82, 83, 84
*Elset, elset=_PIN-2-foro-gomma-BUL-2_S3, internal, instance=foro-gomma-BUL-2
 49, 54, 55, 56, 57, 58, 61, 62, 65, 66, 69, 78
*Surface, type=ELEMENT, name=PIN-2-foro-gomma-BUL-2
_PIN-2-foro-gomma-BUL-2_S4, S4
_PIN-2-foro-gomma-BUL-2_S3, S3
*Elset, elset=_PIN-2-foro-gomma-2_S2, internal, instance=foro-gomma-2
   1,   2,   3,   4,   5,   6
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*Surface, type=ELEMENT, name=PIN-2-foro-gomma-2
_PIN-2-foro-gomma-2_S2, S2
*Elset, elset=_BINT-1-foro-gomma-ST-1_S2, internal, instance=foro-gomma-ST-1
   1,   2,   3,   4,   5,   6
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*Surface, type=ELEMENT, name=BINT-1-foro-gomma-ST-1
_BINT-1-foro-gomma-ST-1_S2, S2
*Elset, elset=_BINT-1-foro-gomma-BUL-1_S2, internal, instance=foro-gomma-BUL-1
  1,  2,  3,  4,  5,  6
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*Elset, elset=_BINT-1-foro-gomma-BUL-1_S3, internal, instance=foro-gomma-BUL-1
 15, 16, 21, 22, 29, 30
*Elset, elset=_BINT-1-foro-gomma-BUL-1_S4, internal, instance=foro-gomma-BUL-1
 17, 18, 27, 28, 33, 34, 35, 36
*Surface, type=ELEMENT, name=BINT-1-foro-gomma-BUL-1
_BINT-1-foro-gomma-BUL-1_S2, S2
_BINT-1-foro-gomma-BUL-1_S3, S3
_BINT-1-foro-gomma-BUL-1_S4, S4
*Elset, elset=_BINT-3-foro-gomma-ST-2_S2, internal, instance=foro-gomma-ST-2
   1,   2,   3,   4,   5,   6
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*Surface, type=ELEMENT, name=BINT-3-foro-gomma-ST-2
_BINT-3-foro-gomma-ST-2_S2, S2
*Elset, elset=_BINT-2-foro-gomma-BUL-1_S2, internal, instance=foro-gomma-BUL-2
  1,  2,  3,  4,  5,  6
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*Elset, elset=_BINT-2-foro-gomma-BUL-1_S3, internal, instance=foro-gomma-BUL-2
 15, 16, 21, 22, 29, 30
*Elset, elset=_BINT-2-foro-gomma-BUL-1_S4, internal, instance=foro-gomma-BUL-2
 17, 18, 27, 28, 33, 34, 35, 36
*Surface, type=ELEMENT, name=BINT-2-foro-gomma-BUL-1
_BINT-2-foro-gomma-BUL-1_S2, S2
_BINT-2-foro-gomma-BUL-1_S3, S3
_BINT-2-foro-gomma-BUL-1_S4, S4
*Elset, elset=_BEXT-1-foro-gomma-ST-1_S1, internal, instance=foro-gomma-ST-1
  16,  17,  18,  19,  20,  21
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*Surface, type=ELEMENT, name=BEXT-1-foro-gomma-ST-1
_BEXT-1-foro-gomma-ST-1_S1, S1
*Elset, elset=_BEXT-2-foro-gomma-ST-2_S1, internal, instance=foro-gomma-ST-2
  11,  12,  13,  14,  15,  16
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*Surface, type=ELEMENT, name=BEXT-2-foro-gomma-ST-2
_BEXT-2-foro-gomma-ST-2_S1, S1
*Elset, elset=_s_Surf-30_S3, internal, instance=BASE-1, generate
   1,  120,    1
*Surface, type=ELEMENT, name=s_Surf-30
_s_Surf-30_S3, S3
*Elset, elset=_m_Surf-31_E4, internal, instance=glass-shell-1, generate
  7,  11,   2
*Elset, elset=_m_Surf-31_E3, internal, instance=glass-shell-1, generate
 123,  127,    1
*Elset, elset=_m_Surf-31_E2, internal, instance=glass-shell-1
 129, 131
*Surface, type=ELEMENT, name=m_Surf-31
_m_Surf-31_E4, E4
_m_Surf-31_E3, E3
_m_Surf-31_E2, E2
*Elset, elset=_s_Surf-31_S2, internal, instance=glass-s1-1
    1,    2,    3,    4,    5,    6
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*Elset, elset=_s_Surf-31_S3, internal, instance=glass-s1-1
    1,    2,    9,   10,   17,   18
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*Elset, elset=_s_Surf-31_S4, internal, instance=glass-s1-1
   72,   76,   80,   84,  130,  134
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*Surface, type=ELEMENT, name=s_Surf-31
_s_Surf-31_S2, S2
_s_Surf-31_S3, S3
_s_Surf-31_S4, S4
*Elset, elset=_m_Surf-33_E4, internal, instance=glass-shell-1
 1, 4
*Elset, elset=_m_Surf-33_E3, internal, instance=glass-shell-1, generate
 33,  37,   1
*Elset, elset=_m_Surf-33_E2, internal, instance=glass-shell-1, generate
 169,  175,    3
*Surface, type=ELEMENT, name=m_Surf-33
_m_Surf-33_E4, E4
_m_Surf-33_E3, E3
_m_Surf-33_E2, E2
*Elset, elset=_s_Surf-33_S2, internal, instance=glass-s1-2
 139, 140, 141, 142, 143, 144
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*Elset, elset=_s_Surf-33_S3, internal, instance=glass-s1-2
    1,    2,    9,   10,   17,   18
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*Elset, elset=_s_Surf-33_S4, internal, instance=glass-s1-2
   72,   76,   80,   84,  130,  134
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*Surface, type=ELEMENT, name=s_Surf-33
_s_Surf-33_S2, S2
_s_Surf-33_S3, S3
_s_Surf-33_S4, S4
*Elset, elset=_ANG-1-LGcut-1_S4, internal, instance=glass-s1-1
  195,  196,  197,  198,  199,  200
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*Elset, elset=_ANG-1-LGcut-1_S3, internal, instance=glass-s1-1
  211,  212,  213,  214,  215,  216
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*Elset, elset=_ANG-1-LGcut-1_S2, internal, instance=glass-s1-1
  265,  266,  267,  268,  269,  270
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*Surface, type=ELEMENT, name=ANG-1-LGcut-1
_ANG-1-LGcut-1_S4, S4
_ANG-1-LGcut-1_S3, S3
_ANG-1-LGcut-1_S2, S2
*Elset, elset=_ANG-2-LGcut-1_S4, internal, instance=glass-s1-2
  195,  196,  197,  198,  199,  200
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*Elset, elset=_ANG-2-LGcut-1_S3, internal, instance=glass-s1-2
  211,  212,  213,  214,  215,  216
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*Elset, elset=_ANG-2-LGcut-1_S2, internal, instance=glass-s1-2
  265,  266,  267,  268,  269,  270
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*Surface, type=ELEMENT, name=ANG-2-LGcut-1
_ANG-2-LGcut-1_S4, S4
_ANG-2-LGcut-1_S3, S3
_ANG-2-LGcut-1_S2, S2
*Elset, elset=_GOMMA-1-foro-gomma-GLASS-1_S4, internal, instance=glass-s1-1
   91,   92,   93,   94,   95,   96
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*Elset, elset=_GOMMA-1-foro-gomma-GLASS-1_S3, internal, instance=glass-s1-1
   85,   86,   87,   88,   89,   90
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*Elset, elset=_GOMMA-1-foro-gomma-GLASS-1_S2, internal, instance=glass-s1-1
  262,  263,  264,  538,  539,  540, 1090, 1091, 1092
*Surface, type=ELEMENT, name=GOMMA-1-foro-gomma-GLASS-1
_GOMMA-1-foro-gomma-GLASS-1_S4, S4
_GOMMA-1-foro-gomma-GLASS-1_S3, S3
_GOMMA-1-foro-gomma-GLASS-1_S2, S2
*Elset, elset=_GOMMA-2-foro-gomma-GLASS-2_S4, internal, instance=glass-s1-2
   91,   92,   93,   94,   95,   96
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*Elset, elset=_GOMMA-2-foro-gomma-GLASS-2_S3, internal, instance=glass-s1-2
   85,   86,   87,   88,   89,   90
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*Elset, elset=_GOMMA-2-foro-gomma-GLASS-2_S2, internal, instance=glass-s1-2
  262,  263,  264,  538,  539,  540, 1090, 1091, 1092
*Surface, type=ELEMENT, name=GOMMA-2-foro-gomma-GLASS-2
_GOMMA-2-foro-gomma-GLASS-2_S4, S4
_GOMMA-2-foro-gomma-GLASS-2_S3, S3
_GOMMA-2-foro-gomma-GLASS-2_S2, S2
*Elset, elset=_ANG-1-ANG1-1_S6, internal, instance=brack-1-1, generate
 259,  289,    2
*Elset, elset=_ANG-1-ANG1-1_S4, internal, instance=brack-1-1
  43,  44,  59,  60,  61,  62
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*Elset, elset=_ANG-1-ANG1-1_S3, internal, instance=brack-1-1
  33,  34,  35,  36,  45,  46
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*Elset, elset=_ANG-1-ANG1-1_S2, internal, instance=brack-1-1
  53,  54,  55, 171, 172, 173, 174, 197, 198, 199, 200
*Surface, type=ELEMENT, name=ANG-1-ANG1-1
_ANG-1-ANG1-1_S6, S6
_ANG-1-ANG1-1_S4, S4
_ANG-1-ANG1-1_S2, S2
_ANG-1-ANG1-1_S3, S3
*Elset, elset=_BEXT-1-ANG1-1_S4, internal, instance=brack-1-1
  41,  42,  69,  70,  95,  96
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*Elset, elset=_BEXT-1-ANG1-1_S3, internal, instance=brack-1-1
  43,  44,  53,  67,  68,  81
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*Elset, elset=_BEXT-1-ANG1-1_S2, internal, instance=brack-1-1
 56,
*Surface, type=ELEMENT, name=BEXT-1-ANG1-1
_BEXT-1-ANG1-1_S4, S4
_BEXT-1-ANG1-1_S3, S3
_BEXT-1-ANG1-1_S2, S2
*Elset, elset=_CP-1-brack-2-1_S2, internal, instance=brack-2-1, generate
 81,  84,   1
*Elset, elset=_CP-1-brack-2-1_S5, internal, instance=brack-2-1
  20,  24,  28,  32,  61,  62,  63,  64, 116, 120, 124, 128
*Surface, type=ELEMENT, name=CP-1-brack-2-1
_CP-1-brack-2-1_S2, S2
_CP-1-brack-2-1_S5, S5
*Elset, elset=_CP-1-brack-1-1_S3, internal, instance=brack-1-1
  89,  90,  91,  92,  97,  98
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*Elset, elset=_CP-1-brack-1-1_S4, internal, instance=brack-1-1
   2,   4,   6,   8,  10,  12
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*Elset, elset=_CP-1-brack-1-1_S2, internal, instance=brack-1-1
 110, 123, 124, 125, 126, 127
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*Surface, type=ELEMENT, name=CP-1-brack-1-1
_CP-1-brack-1-1_S3, S3
_CP-1-brack-1-1_S4, S4
_CP-1-brack-1-1_S2, S2
*Elset, elset=_CP-1-brack-2-2_S2, internal, instance=brack-2-2, generate
 81,  84,   1
*Elset, elset=_CP-1-brack-2-2_S5, internal, instance=brack-2-2
  20,  24,  28,  32,  61,  62,  63,  64, 116, 120, 124, 128
*Surface, type=ELEMENT, name=CP-1-brack-2-2
_CP-1-brack-2-2_S2, S2
_CP-1-brack-2-2_S5, S5
*Elset, elset=_CP-1-brack-1-2_S3, internal, instance=brack-1-2
  89,  90,  91,  92,  97,  98
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*Elset, elset=_CP-1-brack-1-2_S4, internal, instance=brack-1-2
   2,   4,   6,   8,  10,  12
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*Elset, elset=_CP-1-brack-1-2_S2, internal, instance=brack-1-2
 110, 123, 124, 125, 126, 127
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*Surface, type=ELEMENT, name=CP-1-brack-1-2
_CP-1-brack-1-2_S3, S3
_CP-1-brack-1-2_S4, S4
_CP-1-brack-1-2_S2, S2
*Elset, elset=_ANG-2-ang2-1_S6, internal, instance=brack-1-2, generate
 259,  289,    2
*Elset, elset=_ANG-2-ang2-1_S4, internal, instance=brack-1-2
  43,  44,  59,  60,  61,  62
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*Elset, elset=_ANG-2-ang2-1_S3, internal, instance=brack-1-2
  33,  34,  35,  36,  45,  46
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*Elset, elset=_ANG-2-ang2-1_S2, internal, instance=brack-1-2
  53,  54,  55, 171, 172, 173, 174, 197, 198, 199, 200
*Surface, type=ELEMENT, name=ANG-2-ang2-1
_ANG-2-ang2-1_S6, S6
_ANG-2-ang2-1_S4, S4
_ANG-2-ang2-1_S2, S2
_ANG-2-ang2-1_S3, S3
*Elset, elset=_BEXT-2-ang2-1_S4, internal, instance=brack-1-2
  41,  42,  69,  70,  95,  96
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*Elset, elset=_BEXT-2-ang2-1_S3, internal, instance=brack-1-2
  43,  44,  53,  67,  68,  81
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*Elset, elset=_BEXT-2-ang2-1_S2, internal, instance=brack-1-2
 56,
*Surface, type=ELEMENT, name=BEXT-2-ang2-1
_BEXT-2-ang2-1_S4, S4
_BEXT-2-ang2-1_S3, S3
_BEXT-2-ang2-1_S2, S2
*Elset, elset=_BASE-1-ANG1-1_S4, internal, instance=brack-2-1, generate
 113,  128,    1
*Elset, elset=_BASE-1-ANG1-1_S1, internal, instance=brack-2-1, generate
 49,  64,   1
*Surface, type=ELEMENT, name=BASE-1-ANG1-1
_BASE-1-ANG1-1_S4, S4
_BASE-1-ANG1-1_S1, S1
*Elset, elset=_BASE-2-ang2-1_S4, internal, instance=brack-2-2, generate
 113,  128,    1
*Elset, elset=_BASE-2-ang2-1_S1, internal, instance=brack-2-2, generate
 49,  64,   1
*Surface, type=ELEMENT, name=BASE-2-ang2-1
_BASE-2-ang2-1_S4, S4
_BASE-2-ang2-1_S1, S1
*Elset, elset=_Surf-38dx_S6, internal, instance=brack-2-2
  3,  4,  7,  8, 11, 12, 15, 16, 65, 66, 67, 68, 69, 70, 71, 72
*Surface, type=ELEMENT, name=Surf-38dx
_Surf-38dx_S6, S6
*Elset, elset=_Surf-38_S6, internal, instance=brack-2-1
  3,  4,  7,  8, 11, 12, 15, 16, 65, 66, 67, 68, 69, 70, 71, 72
*Surface, type=ELEMENT, name=Surf-38
_Surf-38_S6, S6
*Surface, type=NODE, name=s_Set-41_CNS_, internal
s_Set-41, 1.
*Surface, type=NODE, name=Set-13_CNS_, internal
Set-13, 1.
*Surface, type=NODE, name=Set-13dx_CNS_, internal
Set-13dx, 1.
** Constraint: BINT-1-foro-gomma-BUL-1-foro-gomma-ST-
*Tie, name=BINT-1-foro-gomma-BUL-1-foro-gomma-ST-, adjust=no, position tolerance=1., type=SURFACE TO SURFACE
BINT-1-foro-gomma-BUL-1, BINT-1-foro-gomma-ST-1
** Constraint: BINT-3-foro-gomma-BUL-2-foro-gomma-ST-
*Tie, name=BINT-3-foro-gomma-BUL-2-foro-gomma-ST-, adjust=no, position tolerance=1., type=SURFACE TO SURFACE
BINT-2-foro-gomma-BUL-1, BINT-3-foro-gomma-ST-2
** Constraint: CP-1-brack-1-1-brack-2-1
*Tie, name=CP-1-brack-1-1-brack-2-1, adjust=no, position tolerance=1., type=SURFACE TO SURFACE
CP-1-brack-1-1, CP-1-brack-2-1
** Constraint: CP-1-brack-1-2-brack-2-2
*Tie, name=CP-1-brack-1-2-brack-2-2, adjust=no, position tolerance=1., type=SURFACE TO SURFACE
CP-1-brack-1-2, CP-1-brack-2-2
** Constraint: Constraint-1
*Coupling, constraint name=Constraint-1, ref node=m_Set-41, surface=s_Set-41_CNS_
*Kinematic
** Constraint: Constraint-1-Copy
*Coupling, constraint name=Constraint-1-Copy, ref node=m_Set-30, surface=s_Surf-30
*Kinematic
** Constraint: Constraint-6
*Tie, name=Constraint-6, adjust=no, position tolerance=1., type=SURFACE TO SURFACE
ANG-1-ANG1-1, film-1
** Constraint: Constraint-6b
*Tie, name=Constraint-6b, adjust=no, position tolerance=1., type=SURFACE TO SURFACE
ANG-2-ang2-1, film-2
** Constraint: Constraint-9
*Shell to Solid Coupling, constraint name=Constraint-9, position tolerance=1.
m_Surf-31, s_Surf-31
** Constraint: Constraint-9dx
*Shell to Solid Coupling, constraint name=Constraint-9dx, position tolerance=1.
m_Surf-33, s_Surf-33
** Constraint: Constraint-13
*Tie, name=Constraint-13, adjust=no, position tolerance=1., type=NODE TO SURFACE
Surf-38, Set-13_CNS_
** Constraint: Constraint-13dx
*Tie, name=Constraint-13dx, adjust=no, position tolerance=1., type=NODE TO SURFACE
Surf-38dx, Set-13dx_CNS_
** Constraint: PIN-1-foro-gomma-BUL-1-foro-gomma-1
*Tie, name=PIN-1-foro-gomma-BUL-1-foro-gomma-1, adjust=no, position tolerance=1., type=SURFACE TO SURFACE
PIN-1-foro-gomma-1, PIN-1-foro-gomma-BUL-1
** Constraint: PIN-2-foro-gomma-BUL-2-foro-gomma-2
*Tie, name=PIN-2-foro-gomma-BUL-2-foro-gomma-2, adjust=no, position tolerance=1., type=SURFACE TO SURFACE
PIN-2-foro-gomma-2, PIN-2-foro-gomma-BUL-2
*Element, type=MASS, elset=Set-42_Inertia-1_
1, 3
*Mass, elset=Set-42_Inertia-1_
445.,
*Elset, elset=__BEXT-1-foro-gomma-ST-1-ANG1-1_msm_1_S4, internal, instance=brack-1-1
 201, 215, 216, 221, 222
*Elset, elset=__BEXT-1-foro-gomma-ST-1-ANG1-1_msm_1_S3, internal, instance=brack-1-1
 206,
*Surface, type=ELEMENT, name=_BEXT-1-foro-gomma-ST-1-ANG1-1_msm_1, internal
__BEXT-1-foro-gomma-ST-1-ANG1-1_msm_1_S4, S4
__BEXT-1-foro-gomma-ST-1-ANG1-1_msm_1_S3, S3
*Elset, elset=__BEXT-1-foro-gomma-ST-1-ANG1-1_msm_2_S4, internal, instance=brack-1-1
 175, 181, 182, 195, 196
*Elset, elset=__BEXT-1-foro-gomma-ST-1-ANG1-1_msm_2_S3, internal, instance=brack-1-1
 180,
*Surface, type=ELEMENT, name=_BEXT-1-foro-gomma-ST-1-ANG1-1_msm_2, internal
__BEXT-1-foro-gomma-ST-1-ANG1-1_msm_2_S4, S4
__BEXT-1-foro-gomma-ST-1-ANG1-1_msm_2_S3, S3
*Elset, elset=__BEXT-1-foro-gomma-ST-1-ANG1-1_msm_3_S4, internal, instance=brack-1-1
 339, 340, 345
*Elset, elset=__BEXT-1-foro-gomma-ST-1-ANG1-1_msm_3_S3, internal, instance=brack-1-1
 341, 342, 348
*Surface, type=ELEMENT, name=_BEXT-1-foro-gomma-ST-1-ANG1-1_msm_3, internal
__BEXT-1-foro-gomma-ST-1-ANG1-1_msm_3_S4, S4
__BEXT-1-foro-gomma-ST-1-ANG1-1_msm_3_S3, S3
*Elset, elset=__BEXT-1-foro-gomma-ST-1-ANG1-1_msm_4_S3, internal, instance=brack-1-1
 143, 144, 163, 164, 165, 166
*Elset, elset=__BEXT-1-foro-gomma-ST-1-ANG1-1_msm_4_S4, internal, instance=brack-1-1
 153, 154
*Surface, type=ELEMENT, name=_BEXT-1-foro-gomma-ST-1-ANG1-1_msm_4, internal
__BEXT-1-foro-gomma-ST-1-ANG1-1_msm_4_S3, S3
__BEXT-1-foro-gomma-ST-1-ANG1-1_msm_4_S4, S4
*Elset, elset=__BEXT-1-foro-gomma-ST-1-ANG1-1_msm_5_S3, internal, instance=brack-1-1
  93,  94, 110
*Elset, elset=__BEXT-1-foro-gomma-ST-1-ANG1-1_msm_5_S4, internal, instance=brack-1-1
  95,  96, 107
*Surface, type=ELEMENT, name=_BEXT-1-foro-gomma-ST-1-ANG1-1_msm_5, internal
__BEXT-1-foro-gomma-ST-1-ANG1-1_msm_5_S3, S3
__BEXT-1-foro-gomma-ST-1-ANG1-1_msm_5_S4, S4
*Elset, elset=__BEXT-1-foro-gomma-ST-1-ANG1-1_msm_6_S4, internal, instance=brack-1-1
 41, 42
*Elset, elset=__BEXT-1-foro-gomma-ST-1-ANG1-1_msm_6_S3, internal, instance=brack-1-1
 43, 44, 53
*Elset, elset=__BEXT-1-foro-gomma-ST-1-ANG1-1_msm_6_S2, internal, instance=brack-1-1
 56,
*Surface, type=ELEMENT, name=_BEXT-1-foro-gomma-ST-1-ANG1-1_msm_6, internal
__BEXT-1-foro-gomma-ST-1-ANG1-1_msm_6_S4, S4
__BEXT-1-foro-gomma-ST-1-ANG1-1_msm_6_S3, S3
__BEXT-1-foro-gomma-ST-1-ANG1-1_msm_6_S2, S2
*Elset, elset=__BEXT-1-foro-gomma-ST-1-ANG1-1_msm_7_S3, internal, instance=brack-1-1
 111, 112, 123, 124, 133, 134
*Elset, elset=__BEXT-1-foro-gomma-ST-1-ANG1-1_msm_7_S4, internal, instance=brack-1-1
 121, 122
*Surface, type=ELEMENT, name=_BEXT-1-foro-gomma-ST-1-ANG1-1_msm_7, internal
__BEXT-1-foro-gomma-ST-1-ANG1-1_msm_7_S3, S3
__BEXT-1-foro-gomma-ST-1-ANG1-1_msm_7_S4, S4
*Elset, elset=__BEXT-1-foro-gomma-ST-1-ANG1-1_msm_8_S3, internal, instance=brack-1-1
 67, 68, 81, 84
*Elset, elset=__BEXT-1-foro-gomma-ST-1-ANG1-1_msm_8_S4, internal, instance=brack-1-1
 69, 70
*Surface, type=ELEMENT, name=_BEXT-1-foro-gomma-ST-1-ANG1-1_msm_8, internal
__BEXT-1-foro-gomma-ST-1-ANG1-1_msm_8_S3, S3
__BEXT-1-foro-gomma-ST-1-ANG1-1_msm_8_S4, S4
*Elset, elset=__BEXT-1-foro-gomma-ST-1-ANG1-1_ssm_1_S1, internal, instance=foro-gomma-ST-1, generate
 196,  210,    1
*Surface, type=ELEMENT, name=_BEXT-1-foro-gomma-ST-1-ANG1-1_ssm_1, internal
__BEXT-1-foro-gomma-ST-1-ANG1-1_ssm_1_S1, S1
*Elset, elset=__BEXT-1-foro-gomma-ST-1-ANG1-1_ssm_2_S1, internal, instance=foro-gomma-ST-1, generate
 166,  180,    1
*Surface, type=ELEMENT, name=_BEXT-1-foro-gomma-ST-1-ANG1-1_ssm_2, internal
__BEXT-1-foro-gomma-ST-1-ANG1-1_ssm_2_S1, S1
*Elset, elset=__BEXT-1-foro-gomma-ST-1-ANG1-1_ssm_3_S1, internal, instance=foro-gomma-ST-1, generate
 226,  240,    1
*Surface, type=ELEMENT, name=_BEXT-1-foro-gomma-ST-1-ANG1-1_ssm_3, internal
__BEXT-1-foro-gomma-ST-1-ANG1-1_ssm_3_S1, S1
*Elset, elset=__BEXT-1-foro-gomma-ST-1-ANG1-1_ssm_4_S1, internal, instance=foro-gomma-ST-1, generate
 136,  150,    1
*Surface, type=ELEMENT, name=_BEXT-1-foro-gomma-ST-1-ANG1-1_ssm_4, internal
__BEXT-1-foro-gomma-ST-1-ANG1-1_ssm_4_S1, S1
*Elset, elset=__BEXT-1-foro-gomma-ST-1-ANG1-1_ssm_5_S1, internal, instance=foro-gomma-ST-1, generate
 16,  30,   1
*Surface, type=ELEMENT, name=_BEXT-1-foro-gomma-ST-1-ANG1-1_ssm_5, internal
__BEXT-1-foro-gomma-ST-1-ANG1-1_ssm_5_S1, S1
*Elset, elset=__BEXT-1-foro-gomma-ST-1-ANG1-1_ssm_6_S1, internal, instance=foro-gomma-ST-1, generate
 46,  60,   1
*Surface, type=ELEMENT, name=_BEXT-1-foro-gomma-ST-1-ANG1-1_ssm_6, internal
__BEXT-1-foro-gomma-ST-1-ANG1-1_ssm_6_S1, S1
*Elset, elset=__BEXT-1-foro-gomma-ST-1-ANG1-1_ssm_7_S1, internal, instance=foro-gomma-ST-1, generate
 106,  120,    1
*Surface, type=ELEMENT, name=_BEXT-1-foro-gomma-ST-1-ANG1-1_ssm_7, internal
__BEXT-1-foro-gomma-ST-1-ANG1-1_ssm_7_S1, S1
*Elset, elset=__BEXT-1-foro-gomma-ST-1-ANG1-1_ssm_8_S1, internal, instance=foro-gomma-ST-1, generate
 76,  90,   1
*Surface, type=ELEMENT, name=_BEXT-1-foro-gomma-ST-1-ANG1-1_ssm_8, internal
__BEXT-1-foro-gomma-ST-1-ANG1-1_ssm_8_S1, S1
*Elset, elset=__BEXT-2-foro-gomma-ST-2-ang2-1_msm_1_S4, internal, instance=brack-1-2
 201, 215, 216, 221, 222
*Elset, elset=__BEXT-2-foro-gomma-ST-2-ang2-1_msm_1_S3, internal, instance=brack-1-2
 206,
*Surface, type=ELEMENT, name=_BEXT-2-foro-gomma-ST-2-ang2-1_msm_1, internal
__BEXT-2-foro-gomma-ST-2-ang2-1_msm_1_S4, S4
__BEXT-2-foro-gomma-ST-2-ang2-1_msm_1_S3, S3
*Elset, elset=__BEXT-2-foro-gomma-ST-2-ang2-1_msm_2_S4, internal, instance=brack-1-2
 175, 181, 182, 195, 196
*Elset, elset=__BEXT-2-foro-gomma-ST-2-ang2-1_msm_2_S3, internal, instance=brack-1-2
 180,
*Surface, type=ELEMENT, name=_BEXT-2-foro-gomma-ST-2-ang2-1_msm_2, internal
__BEXT-2-foro-gomma-ST-2-ang2-1_msm_2_S4, S4
__BEXT-2-foro-gomma-ST-2-ang2-1_msm_2_S3, S3
*Elset, elset=__BEXT-2-foro-gomma-ST-2-ang2-1_msm_3_S4, internal, instance=brack-1-2
 339, 340, 345
*Elset, elset=__BEXT-2-foro-gomma-ST-2-ang2-1_msm_3_S3, internal, instance=brack-1-2
 341, 342, 348
*Surface, type=ELEMENT, name=_BEXT-2-foro-gomma-ST-2-ang2-1_msm_3, internal
__BEXT-2-foro-gomma-ST-2-ang2-1_msm_3_S4, S4
__BEXT-2-foro-gomma-ST-2-ang2-1_msm_3_S3, S3
*Elset, elset=__BEXT-2-foro-gomma-ST-2-ang2-1_msm_4_S3, internal, instance=brack-1-2
 143, 144, 163, 164, 165, 166
*Elset, elset=__BEXT-2-foro-gomma-ST-2-ang2-1_msm_4_S4, internal, instance=brack-1-2
 153, 154
*Surface, type=ELEMENT, name=_BEXT-2-foro-gomma-ST-2-ang2-1_msm_4, internal
__BEXT-2-foro-gomma-ST-2-ang2-1_msm_4_S3, S3
__BEXT-2-foro-gomma-ST-2-ang2-1_msm_4_S4, S4
*Elset, elset=__BEXT-2-foro-gomma-ST-2-ang2-1_msm_5_S3, internal, instance=brack-1-2
  93,  94, 110
*Elset, elset=__BEXT-2-foro-gomma-ST-2-ang2-1_msm_5_S4, internal, instance=brack-1-2
  95,  96, 107
*Surface, type=ELEMENT, name=_BEXT-2-foro-gomma-ST-2-ang2-1_msm_5, internal
__BEXT-2-foro-gomma-ST-2-ang2-1_msm_5_S3, S3
__BEXT-2-foro-gomma-ST-2-ang2-1_msm_5_S4, S4
*Elset, elset=__BEXT-2-foro-gomma-ST-2-ang2-1_msm_6_S4, internal, instance=brack-1-2
 41, 42
*Elset, elset=__BEXT-2-foro-gomma-ST-2-ang2-1_msm_6_S3, internal, instance=brack-1-2
 43, 44, 53
*Elset, elset=__BEXT-2-foro-gomma-ST-2-ang2-1_msm_6_S2, internal, instance=brack-1-2
 56,
*Surface, type=ELEMENT, name=_BEXT-2-foro-gomma-ST-2-ang2-1_msm_6, internal
__BEXT-2-foro-gomma-ST-2-ang2-1_msm_6_S4, S4
__BEXT-2-foro-gomma-ST-2-ang2-1_msm_6_S3, S3
__BEXT-2-foro-gomma-ST-2-ang2-1_msm_6_S2, S2
*Elset, elset=__BEXT-2-foro-gomma-ST-2-ang2-1_msm_7_S3, internal, instance=brack-1-2
 111, 112, 123, 124, 133, 134
*Elset, elset=__BEXT-2-foro-gomma-ST-2-ang2-1_msm_7_S4, internal, instance=brack-1-2
 121, 122
*Surface, type=ELEMENT, name=_BEXT-2-foro-gomma-ST-2-ang2-1_msm_7, internal
__BEXT-2-foro-gomma-ST-2-ang2-1_msm_7_S3, S3
__BEXT-2-foro-gomma-ST-2-ang2-1_msm_7_S4, S4
*Elset, elset=__BEXT-2-foro-gomma-ST-2-ang2-1_msm_8_S3, internal, instance=brack-1-2
 67, 68, 81, 84
*Elset, elset=__BEXT-2-foro-gomma-ST-2-ang2-1_msm_8_S4, internal, instance=brack-1-2
 69, 70
*Surface, type=ELEMENT, name=_BEXT-2-foro-gomma-ST-2-ang2-1_msm_8, internal
__BEXT-2-foro-gomma-ST-2-ang2-1_msm_8_S3, S3
__BEXT-2-foro-gomma-ST-2-ang2-1_msm_8_S4, S4
*Elset, elset=__BEXT-2-foro-gomma-ST-2-ang2-1_ssm_1_S1, internal, instance=foro-gomma-ST-2, generate
 131,  140,    1
*Surface, type=ELEMENT, name=_BEXT-2-foro-gomma-ST-2-ang2-1_ssm_1, internal
__BEXT-2-foro-gomma-ST-2-ang2-1_ssm_1_S1, S1
*Elset, elset=__BEXT-2-foro-gomma-ST-2-ang2-1_ssm_2_S1, internal, instance=foro-gomma-ST-2, generate
 111,  120,    1
*Surface, type=ELEMENT, name=_BEXT-2-foro-gomma-ST-2-ang2-1_ssm_2, internal
__BEXT-2-foro-gomma-ST-2-ang2-1_ssm_2_S1, S1
*Elset, elset=__BEXT-2-foro-gomma-ST-2-ang2-1_ssm_3_S1, internal, instance=foro-gomma-ST-2, generate
 151,  160,    1
*Surface, type=ELEMENT, name=_BEXT-2-foro-gomma-ST-2-ang2-1_ssm_3, internal
__BEXT-2-foro-gomma-ST-2-ang2-1_ssm_3_S1, S1
*Elset, elset=__BEXT-2-foro-gomma-ST-2-ang2-1_ssm_4_S1, internal, instance=foro-gomma-ST-2, generate
  91,  100,    1
*Surface, type=ELEMENT, name=_BEXT-2-foro-gomma-ST-2-ang2-1_ssm_4, internal
__BEXT-2-foro-gomma-ST-2-ang2-1_ssm_4_S1, S1
*Elset, elset=__BEXT-2-foro-gomma-ST-2-ang2-1_ssm_5_S1, internal, instance=foro-gomma-ST-2, generate
 11,  20,   1
*Surface, type=ELEMENT, name=_BEXT-2-foro-gomma-ST-2-ang2-1_ssm_5, internal
__BEXT-2-foro-gomma-ST-2-ang2-1_ssm_5_S1, S1
*Elset, elset=__BEXT-2-foro-gomma-ST-2-ang2-1_ssm_6_S1, internal, instance=foro-gomma-ST-2, generate
 31,  40,   1
*Surface, type=ELEMENT, name=_BEXT-2-foro-gomma-ST-2-ang2-1_ssm_6, internal
__BEXT-2-foro-gomma-ST-2-ang2-1_ssm_6_S1, S1
*Elset, elset=__BEXT-2-foro-gomma-ST-2-ang2-1_ssm_7_S1, internal, instance=foro-gomma-ST-2, generate
 71,  80,   1
*Surface, type=ELEMENT, name=_BEXT-2-foro-gomma-ST-2-ang2-1_ssm_7, internal
__BEXT-2-foro-gomma-ST-2-ang2-1_ssm_7_S1, S1
*Elset, elset=__BEXT-2-foro-gomma-ST-2-ang2-1_ssm_8_S1, internal, instance=foro-gomma-ST-2, generate
 51,  60,   1
*Surface, type=ELEMENT, name=_BEXT-2-foro-gomma-ST-2-ang2-1_ssm_8, internal
__BEXT-2-foro-gomma-ST-2-ang2-1_ssm_8_S1, S1
*End Assembly
**
**
*include,input=s5.inp
**
*Amplitude, name=Amp-2V, time=TOTAL TIME
             0.,              0.,              5.,              1.,          10000.,              1.
**
**
** MATERIALS
**
*Material, name=Material-2
*Density
7800.,
*Elastic
 2.1e+12, 0.3
*Material, name=bulloni
*Density
7800.,
*Elastic
 2.1e+11, 0.3
*Plastic
 1e+09,      0.
 1e+09, 0.00112
 1e+09,     40.
*Material, name=glass
*Density
2490.,
*Elastic
 6.3e+10, 0.23
*Material, name=rubber
*Density
1000.,
*Elastic
 4e+10, 0.3
*Material, name=steel
*Damage Initiation, criterion=DUCTILE
 0.25, 0.3,  1.
*Damage Evolution, type=DISPLACEMENT, softening=EXPONENTIAL
 0.0225,10.
*Density
7800.,
*Elastic
 2.1e+11, 0.3
*Plastic
 2.35e+08,      0.
 2.35e+08, 0.00112
 2.35e+08,    0.15
     235.,   0.152
**
** INTERACTION PROPERTIES
**
*Surface Interaction, name=IntProp-1
1.,
*Friction, slip tolerance=0.005
 0.3,
*Surface Behavior, pressure-overclosure=HARD
*Surface Interaction, name=IntProp-2
1.,
*Friction, slip tolerance=0.005
 0.3,
*Surface Behavior, no separation, pressure-overclosure=HARD
*Surface Interaction, name=IntProp-3
1.,
*Friction, slip tolerance=0.005
 0.9,
*Surface Behavior, no separation, pressure-overclosure=HARD
*Surface Smoothing, name=BEXT-1-foro-gomma-ST-1-ANG1-1
, _BEXT-1-foro-gomma-ST-1-ANG1-1_msm_1, CIRCUMFERENTIAL, 0.295, -0.334, 0.003, 0.295, -0.334, 1.003
, _BEXT-1-foro-gomma-ST-1-ANG1-1_msm_2, CIRCUMFERENTIAL, 0.295, -0.334, 0.003, 0.295, -0.334, 1.003
, _BEXT-1-foro-gomma-ST-1-ANG1-1_msm_3, CIRCUMFERENTIAL, 0.295, -0.334, 0.003, 0.295, -0.334, 1.003
, _BEXT-1-foro-gomma-ST-1-ANG1-1_msm_4, CIRCUMFERENTIAL, 0.295, -0.334, 0.003, 0.295, -0.334, 1.003
, _BEXT-1-foro-gomma-ST-1-ANG1-1_msm_5, CIRCUMFERENTIAL, 0.295, -0.334, 0.003, 0.295, -0.334, 1.003
, _BEXT-1-foro-gomma-ST-1-ANG1-1_msm_6, CIRCUMFERENTIAL, 0.295, -0.334, 0.003, 0.295, -0.334, 1.003
, _BEXT-1-foro-gomma-ST-1-ANG1-1_msm_7, CIRCUMFERENTIAL, 0.295, -0.334, 0.003, 0.295, -0.334, 1.003
, _BEXT-1-foro-gomma-ST-1-ANG1-1_msm_8, CIRCUMFERENTIAL, 0.295, -0.334, 0.003, 0.295, -0.334, 1.003
_BEXT-1-foro-gomma-ST-1-ANG1-1_ssm_1, , CIRCUMFERENTIAL, 0.295, -0.334, 0.003, 0.295, -0.334, 1.003
_BEXT-1-foro-gomma-ST-1-ANG1-1_ssm_2, , CIRCUMFERENTIAL, 0.295, -0.334, 0.003, 0.295, -0.334, 1.003
_BEXT-1-foro-gomma-ST-1-ANG1-1_ssm_3, , CIRCUMFERENTIAL, 0.295, -0.334, 0.003, 0.295, -0.334, 1.003
_BEXT-1-foro-gomma-ST-1-ANG1-1_ssm_4, , CIRCUMFERENTIAL, 0.295, -0.334, 0.003, 0.295, -0.334, 1.003
_BEXT-1-foro-gomma-ST-1-ANG1-1_ssm_5, , CIRCUMFERENTIAL, 0.295, -0.334, 0.003, 0.295, -0.334, 1.003
_BEXT-1-foro-gomma-ST-1-ANG1-1_ssm_6, , CIRCUMFERENTIAL, 0.295, -0.334, 0.003, 0.295, -0.334, 1.003
_BEXT-1-foro-gomma-ST-1-ANG1-1_ssm_7, , CIRCUMFERENTIAL, 0.295, -0.334, 0.003, 0.295, -0.334, 1.003
_BEXT-1-foro-gomma-ST-1-ANG1-1_ssm_8, , CIRCUMFERENTIAL, 0.295, -0.334, 0.003, 0.295, -0.334, 1.003
*Surface Smoothing, name=BEXT-2-foro-gomma-ST-2-ang2-1
, _BEXT-2-foro-gomma-ST-2-ang2-1_msm_1, CIRCUMFERENTIAL, 0.695, -0.334, 0.003, 0.695, -0.334, 1.003
, _BEXT-2-foro-gomma-ST-2-ang2-1_msm_2, CIRCUMFERENTIAL, 0.695, -0.334, 0.003, 0.695, -0.334, 1.003
, _BEXT-2-foro-gomma-ST-2-ang2-1_msm_3, CIRCUMFERENTIAL, 0.695, -0.334, 0.003, 0.695, -0.334, 1.003
, _BEXT-2-foro-gomma-ST-2-ang2-1_msm_4, CIRCUMFERENTIAL, 0.695, -0.334, 0.003, 0.695, -0.334, 1.003
, _BEXT-2-foro-gomma-ST-2-ang2-1_msm_5, CIRCUMFERENTIAL, 0.695, -0.334, 0.003, 0.695, -0.334, 1.003
, _BEXT-2-foro-gomma-ST-2-ang2-1_msm_6, CIRCUMFERENTIAL, 0.695, -0.334, 0.003, 0.695, -0.334, 1.003
, _BEXT-2-foro-gomma-ST-2-ang2-1_msm_7, CIRCUMFERENTIAL, 0.695, -0.334, 0.003, 0.695, -0.334, 1.003
, _BEXT-2-foro-gomma-ST-2-ang2-1_msm_8, CIRCUMFERENTIAL, 0.695, -0.334, 0.003, 0.695, -0.334, 1.003
_BEXT-2-foro-gomma-ST-2-ang2-1_ssm_1, , CIRCUMFERENTIAL, 0.695, -0.334, 0.003, 0.695, -0.334, 1.003
_BEXT-2-foro-gomma-ST-2-ang2-1_ssm_2, , CIRCUMFERENTIAL, 0.695, -0.334, 0.003, 0.695, -0.334, 1.003
_BEXT-2-foro-gomma-ST-2-ang2-1_ssm_3, , CIRCUMFERENTIAL, 0.695, -0.334, 0.003, 0.695, -0.334, 1.003
_BEXT-2-foro-gomma-ST-2-ang2-1_ssm_4, , CIRCUMFERENTIAL, 0.695, -0.334, 0.003, 0.695, -0.334, 1.003
_BEXT-2-foro-gomma-ST-2-ang2-1_ssm_5, , CIRCUMFERENTIAL, 0.695, -0.334, 0.003, 0.695, -0.334, 1.003
_BEXT-2-foro-gomma-ST-2-ang2-1_ssm_6, , CIRCUMFERENTIAL, 0.695, -0.334, 0.003, 0.695, -0.334, 1.003
_BEXT-2-foro-gomma-ST-2-ang2-1_ssm_7, , CIRCUMFERENTIAL, 0.695, -0.334, 0.003, 0.695, -0.334, 1.003
_BEXT-2-foro-gomma-ST-2-ang2-1_ssm_8, , CIRCUMFERENTIAL, 0.695, -0.334, 0.003, 0.695, -0.334, 1.003
**
** BOUNDARY CONDITIONS
**
** Name: BC-4-Copy Type: Displacement/Rotation
*Boundary
Set-42, 3, 3
** Name: BC-6 Type: Displacement/Rotation
*Boundary
Set-3, 3, 3
** Name: BC-8 Type: Displacement/Rotation
*Boundary
Set-43, 3, 3
Set-43, 4, 4
Set-43, 5, 5
** Name: BC-9 Type: Displacement/Rotation
*Boundary
Set-29, 2, 2
Set-29, 3, 3
Set-29, 4, 4
Set-29, 5, 5
Set-29, 6, 6
** Name: BC-10 Type: Displacement/Rotation
*Boundary
Set-MID, 3, 3
Set-MID, 4, 4
Set-MID, 5, 5
**
** INTERACTIONS
**
** Interaction: ANG-1-LGcut-1-ANG1-1
*Contact Pair, interaction=IntProp-1, type=SURFACE TO SURFACE
ANG-1-LGcut-1, film-1b
** Interaction: ANG-2-LGcut-1-ang2-1
*Contact Pair, interaction=IntProp-1, type=SURFACE TO SURFACE
ANG-2-LGcut-1, film-2b
** Interaction: BASE-1-BASE-1-ANG1-1
*Contact Pair, interaction=IntProp-1, type=SURFACE TO SURFACE
BASE-1-ANG1-1, BASE-1-BASE-1
** Interaction: BASE-2-BASE-1-ang2-1
*Contact Pair, interaction=IntProp-1, type=SURFACE TO SURFACE
BASE-2-ang2-1, BASE-2-BASE-1
** Interaction: BEXT-1-foro-gomma-ST-1-ANG1-1
*Contact Pair, interaction=IntProp-3, small sliding, type=SURFACE TO SURFACE, geometric correction=BEXT-1-foro-gomma-ST-1-ANG1-1
BEXT-1-foro-gomma-ST-1, BEXT-1-ANG1-1
** Interaction: BEXT-2-foro-gomma-ST-2-ang2-1
*Contact Pair, interaction=IntProp-3, small sliding, type=SURFACE TO SURFACE, geometric correction=BEXT-2-foro-gomma-ST-2-ang2-1
BEXT-2-foro-gomma-ST-2, BEXT-2-ang2-1
** Interaction: GOMMA-1-foro-gomma-1-foro-gomma-GLASS-
*Contact Pair, interaction=IntProp-1, type=SURFACE TO SURFACE
GOMMA-1-foro-gomma-GLASS-1, GOMMA-1-foro-gomma-1
** Interaction: GOMMA-2-foro-gomma-2-foro-gomma-GLASS-
*Contact Pair, interaction=IntProp-1, type=SURFACE TO SURFACE
GOMMA-2-foro-gomma-GLASS-2, GOMMA-2-foro-gomma-2
** ----------------------------------------------------------------
**
** STEP: Step-2
**
*Step, name=Step-2, nlgeom=YES
*Static
1., 5., 5e-05, 5.
**
** LOADS
**
** Name: Load-2   Type: Gravity
*Dload, amplitude=Amp-2V
Set-TOT, GRAV, 9.81, 0., -1., 0.
** Name: Load-1   Type: Concentrated force
*Cload, amplitude=Amp-2V
Set-42, 2, -9000.
**
** OUTPUT REQUESTS
**
*Restart, write, frequency=0
**
** FIELD OUTPUT: F-Output-1
**
*Output, field, frequency=99999
*Node Output
RF, U
*Element Output, directions=YES
NE, PE, S, SDEG, PEEQ
*Output, history, frequency=0
*End Step
** ----------------------------------------------------------------
**
** STEP: Step-1
**
*Step, name=Step-1, inc=10000, nlgeom=YES
*Dynamic
0.001,55.,0.0005,0.1
**
** BOUNDARY CONDITIONS
**
** Name: BC-4-Copy Type: Displacement/Rotation
*Boundary, op=NEW
Set-42, 3, 3
** Name: BC-6 Type: Displacement/Rotation
*Boundary, op=NEW
Set-3, 3, 3
** Name: BC-8 Type: Displacement/Rotation
*Boundary, op=NEW
Set-43, 3, 3
Set-43, 4, 4
Set-43, 5, 5
** Name: BC-9 Type: Displacement/Rotation
*Boundary, op=NEW, amplitude=Amp-1
Set-29, 2, 2
Set-29, 3, 3
Set-29, 4, 4
Set-29, 5, 5
Set-29, 6, 6
** Name: BC-10 Type: Displacement/Rotation
*Boundary, op=NEW
Set-MID, 3, 3
Set-MID, 4, 4
Set-MID, 5, 5
** Name: BC-11 Type: Acceleration/Angular acceleration
*Boundary, op=NEW, amplitude=Amp-1, type=ACCELERATION
Set-29, 1, 1, 1.
**
** OUTPUT REQUESTS
**
*Restart, write, number interval=1, time marks=NO
**
** FIELD OUTPUT: F-Output-1
**
*Output, field, frequency=1
*Node Output
RF, U
*Element Output, directions=YES
NE, PE, S, SDEG, PEEQ
**
** HISTORY OUTPUT: H-Output-1
**
*Output, history, variable=PRESELECT, frequency=1
*End Step
